# OpenSim document version 40000
ExternalLoads:
  datafile: ExperimentalData\walking_GRF.mot
  ExternalForce L1: applied_to_body=calcn_l force_expressed_in_body=ground point_expressed_in_body=ground
      force_identifier=ground_force3_v point_identifier=ground_force3_p torque_identifier=ground_torque3_
      data_source_name=Walk_Norm15
  ExternalForce R1: applied_to_body=calcn_r force_expressed_in_body=ground point_expressed_in_body=ground
      force_identifier=ground_force2_v point_identifier=ground_force2_p torque_identifier=ground_torque2_
      data_source_name=Walk_Norm15
  ExternalForce L2: applied_to_body=calcn_l force_expressed_in_body=ground point_expressed_in_body=ground
      force_identifier=ground_force1_v point_identifier=ground_force1_p torque_identifier=ground_torque1_
      data_source_name=Walk_Norm15
